*Heading
** Job name: Plain_Cylinder-CFRP_wrap-0-8-layer-Contact-no-CFRP-comp Model name: C120_Cylinder_Plain_concrete-CFRP-NO_wrap
** Generated by: Abaqus/CAE 2019
*Preprint, echo=NO, model=NO, history=NO, contact=NO
**
** PARTS
**
*Part, name=Part-2
*Node
      1,           0.,        -200.,         400.
      2,           0.,        -201.,         400.
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*Element, type=SC8R
 1,  70, 337,  38,   1,  80, 400,  25,   2
 2, 337, 338,  37,  38, 400, 401,  26,  25
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*Nset, nset=Set-8
   2,  18, 222, 223, 224, 225, 226, 227, 228, 229, 230
*Elset, elset=Set-8
 241, 249, 257, 265, 273, 281
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*Elset, elset=_Surf-2_S2, internal, generate
   1,  640,    1
*Surface, type=ELEMENT, name=Surf-2
_Surf-2_S2, S2
*Distribution, name=Ori-1-DiscOrient, location=ELEMENT, Table=Ori-1-DiscOrient_Table
** Description: Distribution generated from Discrete Orientation
,           1.,           0.,           0.,           0.,           1.,           0.
1, -0.995184719562531, -0.0980171412229538,           0.,           0.,           0.,          -1.
2, -0.956940352916718, -0.290284663438797,           0.,           0.,           0.,          -1.
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640, 0.995184719562531, -0.0980171412229538,           0.,           0.,           0.,          -1.
*Orientation, name=Ori-1, system=RECTANGULAR
Ori-1-DiscOrient
3, 90.
** Region: (CompositeLayup-1-1: Generated From Layup), (Controls:EC-1)
*Elset, elset=CompositeLayup-1-1, generate
   1,  640,    1
** Section: CompositeLayup-1-1
*Shell Section, elset=CompositeLayup-1-1, composite, orientation=Ori-1, controls=EC-1, stack direction=3, layup=CompositeLayup-1
1., 3, Material-2, 0., Ply-1
1., 3, Material-2, 0., Ply-2
1., 3, Material-2, 0., Ply-3
1., 3, Material-2, 0., Ply-4
1., 3, Material-2, 0., Ply-5
1., 3, Material-2, 0., Ply-6
1., 3, Material-2, 0., Ply-7
1., 3, Material-2, 0., Ply-8
*End Part
**
*Part, name=Part-3
*Node
      1,           0.,        -200.,         400.
      2,           0.,           0.,         400.
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*Element, type=C3D8
  1,  317, 1237,  238,   16,   27,  254,   26,    1
  2, 1237, 1238,  239,  238,  254,  255,   25,   26
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*Nset, nset=Set-1, generate
    1,  2373,     1
*Elset, elset=Set-1, generate
    1,  1920,     1
** Section: Section-1
*Solid Section, elset=Set-1, controls=EC-1, material=Material-1
,
*End Part
**
**
** ASSEMBLY
**
*Assembly, name=Assembly
**
*Instance, name=Part-2-2, part=Part-2
*End Instance
**
*Instance, name=Part-3-2, part=Part-3
*End Instance
**
*Node
      1,           0.,           0.,           0.
*Nset, nset=Set-24, instance=Part-3-2
    4,    5,    6,   11,   12,   58
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*Elset, elset=Set-24, instance=Part-3-2
  125,  130,  135,  140,  145,  150
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*Nset, nset=Set-25, instance=Part-3-2
    8,    9,   10,   14,   15,  111
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*Elset, elset=Set-25, instance=Part-3-2
  365,  370,  375,  380,  385,  390
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*Nset, nset=Set-26
 1,
*Nset, nset=Set-27, instance=Part-3-2
 13,
*Nset, nset=Set-28, instance=Part-3-2
 13,
*Nset, nset=Set-32, instance=Part-2-2
  17,  18,  19,  20,  21,  22
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*Nset, nset=Set-32, instance=Part-3-2
    4,    5,    6,   11,   12,   58
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*Elset, elset=Set-32, instance=Part-2-2
 313, 314, 315, 316, 317, 318
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*Elset, elset=Set-32, instance=Part-3-2
  125,  130,  135,  140,  145,  150
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*Nset, nset=Set-33, instance=Part-2-2
   5,   6,   7,   8,  11,  12
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*Nset, nset=Set-33, instance=Part-3-2
    8,    9,   10,   14,   15,  111
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*Elset, elset=Set-33, instance=Part-2-2
  73,  74,  75,  76,  77,  78
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*Elset, elset=Set-33, instance=Part-3-2
  365,  370,  375,  380,  385,  390
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*Nset, nset=Set-36
 1,
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*Nset, nset=t_Set-37, instance=Part-3-2
    8,    9,   10,   14,   15,  111
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*Elset, elset=t_Set-37, instance=Part-3-2
  365,  370,  375,  380,  385,  390
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*Nset, nset=_PickedSet61, internal
 1,
*Elset, elset=_Surf-Inner_S1, internal, instance=Part-2-2, generate
   1,  640,    1
*Surface, type=ELEMENT, name=Surf-Inner
_Surf-Inner_S1, S1
*Elset, elset=_Surf-Outer_S2, internal, instance=Part-3-2
    1,    2,    3,    4,    5,    6
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*Surface, type=ELEMENT, name=Surf-Outer
_Surf-Outer_S2, S2
** Constraint: Constraint-3
*Rigid Body, ref node=_PickedSet61, tie nset=t_Set-37
*End Assembly
*Distribution Table, name=Ori-1-DiscOrient_Table
coord3D, coord3D
**
** ELEMENT CONTROLS
**
*Section Controls, name=EC-1, ELEMENT DELETION=YES
1., 1., 1.
*Amplitude, name=Amp-1
           0.01,            0.01,            0.02,            0.02,            0.03,            0.03,            0.04,            0.04
           0.05,            0.05,            0.06,            0.06,            0.07,            0.07,            0.08,            0.08
           0.09,            0.09,             0.1,             0.1,            0.11,            0.11,            0.12,            0.12
           0.13,            0.13,            0.14,            0.14,            0.15,            0.15,            0.16,            0.16
           0.17,            0.17,            0.18,            0.18,            0.19,            0.19,             0.2,             0.2
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           0.97,            0.97,            0.98,            0.98,            0.99,            0.99,              1.,              1.
**
** MATERIALS
**
*Material, name=Material-1
*Density
 2.5e-09,
*Elastic
 41907.3, 0.2
*Concrete Damaged Plasticity
35.,   0.1,  1.16,  0.67, 1e-05
*Concrete Compression Hardening
 102.102,          0.
 110.617,  0.00011043
 117.466,    0.000197
 117.822, 0.000205391
    120., 0.000336538
 96.8558,  0.00118881
 75.3216,  0.00195266
 58.8072,  0.00259673
 46.7899,  0.00313349
 38.0287,  0.00359255
 31.5268,   0.0039977
 26.5963,  0.00436535
  23.007,  0.00468413
 20.1298,   0.0049859
  15.358,  0.00563353
*Concrete Tension Stiffening
 2.842,0.
*Concrete Compression Damage
       0.,          0.
       0.,  0.00011043
       0.,    0.000197
       0., 0.000205391
       0., 0.000336538
 0.192868,  0.00118881
  0.37232,  0.00195266
  0.50994,  0.00259673
 0.610084,  0.00313349
 0.683094,  0.00359255
 0.737277,   0.0039977
 0.778364,  0.00436535
 0.808275,  0.00468413
 0.832251,   0.0049859
*Concrete Failure, TYPE=Strain
0,0.00563,0,0.87201
*Material, name=Material-2
*Damage Initiation, criterion=HASHIN
1200., 972.,  37., 147., 71.5,  32.
*Damage Evolution, type=ENERGY
48.,60., 4., 8.
*Damage Stabilization
0.0001,0.0001,0.0001,0.0001
*Density
 1.7e-09,
*Elastic, type=ENGINEERING CONSTANTS
105500.,10000.,10000.,  0.32,  0.32,  0.44, 3300., 3300.
 3600.,
**
** INTERACTION PROPERTIES
**
*Surface Interaction, name=IntProp-1
*Friction
0.,
*Surface Behavior, pressure-overclosure=HARD
**
** BOUNDARY CONDITIONS
**
** Name: BC-1 Type: Displacement/Rotation
*Boundary
Set-32, 1, 1
Set-32, 2, 2
Set-32, 3, 3
** Name: BC-2 Type: Displacement/Rotation
*Boundary
Set-33, 1, 1
Set-33, 2, 2
**
** INTERACTIONS
**
** Interaction: Int-1
*Contact, op=NEW
*Contact Inclusions, ALL EXTERIOR
*Contact Property Assignment
 ,  , IntProp-1
** ----------------------------------------------------------------
**
** STEP: Step-1
**
*Step, name=Step-1, nlgeom=YES
*Dynamic, Explicit
, 1.
*Bulk Viscosity
0.06, 1.2
**
** BOUNDARY CONDITIONS
**
** Name: BC-3 Type: Displacement/Rotation
*Boundary, amplitude=Amp-1
Set-36, 3, 3, 10.
**
** OUTPUT REQUESTS
**
*Restart, write, number interval=1, time marks=NO
**
** FIELD OUTPUT: F-Output-1
**
*Output, field, time interval=0.01
*Node Output
RF, U, V
*Element Output, directions=YES
DAMAGEC, DAMAGEFC, DAMAGEFT, DAMAGEMC, DAMAGEMT, DAMAGESHR, DAMAGET, LE, PE, PEEQ, S, STATUS
*Contact Output
CSTRESS,
**
** HISTORY OUTPUT: H-Output-1
**
*Output, history, variable=PRESELECT
*End Step
